*Heading
** Job name: plate_ellipse84__10000 Model name: PlateModel
** Generated by: Abaqus/CAE 2022
*Preprint, echo=NO, model=NO, history=NO, contact=NO
**
** PARTS
**
*Part, name=plate
*Node
      1,   3.75205398,  0.693197429
      2,   3.14095807,   1.23838425
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*Element, type=CPS3
   1, 326,  16, 325
   2, 601, 224, 494
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*Nset, nset=_PickedSet2, internal, generate
   1,  861,    1
*Elset, elset=_PickedSet2, internal, generate
    1,  1543,     1
** Section: Section-1
*Solid Section, elset=_PickedSet2, material=Material-1
1.,
*End Part
**
**
** ASSEMBLY
**
*Assembly, name=Assembly
**
*Instance, name=plate-1, part=plate
*End Instance
**
*Nset, nset=LeftEdgeSet, instance=plate-1
  49,  50,  51,  52,  53,  54,  55, 279, 280, 281, 282, 283
*Elset, elset=LeftEdgeSet, instance=plate-1
 217, 349, 422, 424, 425, 427, 763, 771, 776, 779, 786
*Elset, elset=_LoadSurface_S2, internal, instance=plate-1
 239, 242, 462, 464, 465, 761, 765, 773, 775, 794
*Elset, elset=_LoadSurface_S1, internal, instance=plate-1
 467,
*Surface, type=ELEMENT, name=LoadSurface
_LoadSurface_S2, S2
_LoadSurface_S1, S1
*End Assembly
**
** MATERIALS
**
*Material, name=Material-1
*Elastic
 2.9e+07, 0.3
**
** BOUNDARY CONDITIONS
**
** Name: BC-LeftEdge Type: Displacement/Rotation
*Boundary
LeftEdgeSet, 1, 1
LeftEdgeSet, 2, 2
** ----------------------------------------------------------------
**
** STEP: Step-1
**
*Step, name=Step-1, nlgeom=NO
*Static
1., 1., 1e-05, 1.
**
** LOADS
**
** Name: Load-1   Type: Pressure
*Dsload
LoadSurface, P, -10000.
**
** OUTPUT REQUESTS
**
*Restart, write, frequency=0
**
** FIELD OUTPUT: F-Output-1
**
*Output, field, variable=PRESELECT
**
** HISTORY OUTPUT: H-Output-1
**
*Output, history, variable=PRESELECT
*End Step
